// SBML level 3 version 2

model gelain_2020_cellulose_hydrolysis_candidate()
  // Exported from FungMod. Well-mixed model; species are represented as SBML amounts in a unit (size 1) compartment so the kinetic law reproduces FungMod's rate law exactly.
  // Assay-activity base units without an SI representation are written as named dimensionless unit definitions; the kinetic laws carry every numeric conversion explicitly and no SI equivalent is implied: filter_paper_unit, beta_glucosidase_assay_unit.
  // model units - time: unit_0

  // Compartments:
  compartment compartment = 1;

  // Species:
  substanceOnly species cellulose_concentration in compartment = 10;  // substance in unit_1
  substanceOnly species cellulase_activity in compartment = 0;  // substance in unit_2
  substanceOnly species biomass_dry_mass_concentration in compartment = 0.3990673;  // substance in unit_1
  substanceOnly species consumed_cellulose_not_retained_as_biomass in compartment = 0;  // substance in unit_1
  substanceOnly species biomass_dry_mass_lost in compartment = 0;  // substance in unit_1
  substanceOnly species beta_glucosidase_activity in compartment = 0;  // substance in unit_3

  // Parameters:
  gelain_hydrolysis_k_h = 0.01268178 unit_4;
  gelain_hydrolysis_Kh = 10.532 unit_1;
  gelain_hydrolysis_Y = 0.3717014 unit_5;
  gelain_hydrolysis_kd = 0.01792004 unit_6;
  gelain_hydrolysis_K_ind = 0.01008757 unit_1;
  gelain_hydrolysis_qF = 6.883661 unit_7;
  gelain_hydrolysis_kF = 3.903918e-5 unit_6;
  gelain_hydrolysis_qB = 15.99253 unit_8;
  gelain_hydrolysis_kB = 1.242736e-6 unit_6;
  gelain_2020_cellulose_initial_biomass = 0.3990673 unit_1;
  gelain_2020_cellulose_initial_loading = 10 unit_1;
  gelain_2020_cellulose_initial_cellulase_activity = 0 unit_2;
  gelain_2020_cellulose_initial_beta_glucosidase_activity = 0 unit_3;

  // Reactions:
  cellulase_limited_cellulose_consumption__reaction_0: cellulose_concentration => ; 0.0002777778*(gelain_hydrolysis_k_h*cellulase_activity*cellulose_concentration/(gelain_hydrolysis_Kh + cellulose_concentration));  // modifiers: cellulase_activity
  cellulase_limited_cellulose_consumption__biomass_dry_mass_concentration__reaction_0: => biomass_dry_mass_concentration; 0.0002777778*gelain_hydrolysis_Y*(gelain_hydrolysis_k_h*cellulase_activity*cellulose_concentration/(gelain_hydrolysis_Kh + cellulose_concentration)); cellulase_limited_cellulose_consumption__biomass_dry_mass_concentration__reaction_0 is "cellulase_limited_cellulose_consumption -> biomass_dry_mass_concentration";  // modifiers: cellulose_concentration, cellulase_activity
  cellulase_limited_cellulose_consumption__consumed_cellulose_not_retained_as_biomass__reaction_0: => consumed_cellulose_not_retained_as_biomass; 0.0002777778*(1 - gelain_hydrolysis_Y)*(gelain_hydrolysis_k_h*cellulase_activity*cellulose_concentration/(gelain_hydrolysis_Kh + cellulose_concentration)); cellulase_limited_cellulose_consumption__consumed_cellulose_not_retained_as_biomass__reaction_0 is "cellulase_limited_cellulose_consumption -> consumed_cellulose_not_retained_as_biomass";  // modifiers: cellulose_concentration, cellulase_activity
  biomass_loss__reaction_1: biomass_dry_mass_concentration => biomass_dry_mass_lost; 0.0002777778*gelain_hydrolysis_kd*biomass_dry_mass_concentration;
  cellulase_synthesis__reaction_2: => cellulase_activity; 0.0002777778*(gelain_hydrolysis_qF*biomass_dry_mass_concentration*cellulose_concentration/(gelain_hydrolysis_K_ind + cellulose_concentration));  // modifiers: biomass_dry_mass_concentration, cellulose_concentration
  cellulase_loss__reaction_3: cellulase_activity => ; 0.0002777778*gelain_hydrolysis_kF*cellulase_activity;
  beta_glucosidase_synthesis__reaction_4: => beta_glucosidase_activity; 0.0002777778*(gelain_hydrolysis_qB*biomass_dry_mass_concentration*cellulose_concentration/(gelain_hydrolysis_K_ind + cellulose_concentration));  // modifiers: biomass_dry_mass_concentration, cellulose_concentration
  beta_glucosidase_loss__reaction_5: beta_glucosidase_activity => ; 0.0002777778*gelain_hydrolysis_kB*beta_glucosidase_activity;

  // Unit definitions:
  unit unit_0 = second; unit_0 is "second";
  unit unit_1 = kilogram / metre^3; unit_1 is "gram / liter";
  unit unit_2 = 1000 dimensionless * dimensionless / metre^3; unit_2 is "filter_paper_unit / liter";
  unit unit_3 = 1000 dimensionless * dimensionless / metre^3; unit_3 is "beta_glucosidase_assay_unit / liter";
  unit unit_4 = 2.777778e-7 dimensionless * kilogram / (dimensionless * second); unit_4 is "gram / filter_paper_unit / hour";
  unit unit_5 = dimensionless; unit_5 is "dimensionless";
  unit unit_6 = 2.777778e-4 dimensionless / second; unit_6 is "1 / hour";
  unit unit_7 = 0.2777778 dimensionless * dimensionless / (kilogram * second); unit_7 is "filter_paper_unit / gram / hour";
  unit unit_8 = 0.2777778 dimensionless * dimensionless / (kilogram * second); unit_8 is "beta_glucosidase_assay_unit / gram / hour";
end
